V_in := 5
mmHg_min := 0
mmHg_max := 250
max := 5*10^-6*V_in*mmHg_max
minimum := 5*10^-6*V_in*mmHg_min
max = 0.00625
minimum = 0
(max*x == 9) solve, x → 1440
max*1440 = 9
x := □  # error: This placeholder is empty.
1 + 50000/x1 == 1440 solve, x1 → 50000/1439 simplify → 50000/1439
fs := 1 + 50000/x  # error: This variable is undefined.
fs =  # error: This variable is undefined.
# vælger en modstand på 62,5, hvor den indeholder 51 ohm + 10 ohm + 1,5 ohm
3
